*Heading
** Job name: steptwo Model name: Model-1
** Generated by: Abaqus/CAE 2024
*Preprint, echo=NO, model=NO, history=NO, contact=NO
**
** PARTS
**
*Part, name=chair
*Node
      1,  -3.95591617,   15.8665047,        -500.
      2,  -3.95591617,   15.8665047,           0.
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*Element, type=S8R
 1,    1,   25,   62,    4, 1653, 1654, 1655, 1656
 2,   25,   26,   61,   62, 1657, 1658, 1659, 1654
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*Nset, nset=Set-1, generate
    1,  4860,     1
*Elset, elset=Set-1, generate
    1,  1557,     1
*Nset, nset=_PickedSet9, internal, generate
    1,  4860,     1
*Elset, elset=_PickedSet9, internal, generate
    1,  1557,     1
** Section: Section-1
*Shell Section, elset=_PickedSet9, material=Material-1
8., 5
*End Part
**
**
** ASSEMBLY
**
*Assembly, name=Assembly
**
*Instance, name=chair-1, part=chair
*End Instance
**
*Nset, nset=BCS, instance=chair-1
    7,    8,    9,   10,   82,   83
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*Elset, elset=BCS, instance=chair-1
  41,  42,  43,  44,  45,  46
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*Nset, nset=Set-2, instance=chair-1
  8, 10
*Nset, nset=Set-3, instance=chair-1
    7,    8,    9,   10,   82,   83
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*Elset, elset=Set-3, instance=chair-1
  41,  42,  43,  44,  45,  46
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*Nset, nset=Set-4, instance=chair-1
    7,    8,   82,   83,   84,   85
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*Elset, elset=Set-4, instance=chair-1, generate
 41,  80,   1
*Nset, nset=Set-5, instance=chair-1
  8, 10
*Nset, nset=Set-6, instance=chair-1
    7,    8,    9,   10,   82,   83
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*Elset, elset=Set-6, instance=chair-1
  41,  42,  43,  44,  45,  46
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*Nset, nset=Set-7, instance=chair-1
    7,    8,   82,   83,   84,   85
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*Elset, elset=Set-7, instance=chair-1, generate
 41,  80,   1
*Elset, elset=_bottom_SPOS, internal, instance=chair-1, generate
  981,  1200,     1
*Surface, type=ELEMENT, name=bottom
_bottom_SPOS, SPOS
*End Assembly
**
** MATERIALS
**
*Material, name=Material-1
*Elastic
16000., 0.33
*Fail Stress
165.,225.,165.,225., 62.,  0.,  0.
**
** BOUNDARY CONDITIONS
**
** Name: BC-3 Type: Displacement/Rotation
*Boundary
Set-5, 3, 3
** Name: BC-4 Type: Displacement/Rotation
*Boundary
Set-6, 2, 2
** Name: BC-5 Type: Displacement/Rotation
*Boundary
Set-7, 1, 1
** ----------------------------------------------------------------
**
** STEP: Step-1
**
*Step, name=Step-1, nlgeom=NO, perturbation
*Buckle, eigensolver=lanczos
5, 0., , ,
**
** BOUNDARY CONDITIONS
**
** Name: BC-3 Type: Displacement/Rotation
*Boundary, op=NEW, load case=1
Set-5, 3, 3
*Boundary, op=NEW, load case=2
Set-5, 3, 3
** Name: BC-4 Type: Displacement/Rotation
*Boundary, op=NEW, load case=1
Set-6, 2, 2
*Boundary, op=NEW, load case=2
Set-6, 2, 2
** Name: BC-5 Type: Displacement/Rotation
*Boundary, op=NEW, load case=1
Set-7, 1, 1
*Boundary, op=NEW, load case=2
Set-7, 1, 1
**
** LOADS
**
** Name: Load-1   Type: Pressure
*Dsload, op=NEW
bottom, P, 0.0103052
**
** OUTPUT REQUESTS
**
*Restart, write, frequency=0
**
** FIELD OUTPUT: F-Output-1
**
*Output, field, variable=PRESELECT
*End Step
** ----------------------------------------------------------------
**
** STEP: Step-2
**
*Step, name=Step-2, nlgeom=NO
*Static
1., 1., 1e-05, 1.
**
** LOADS
**
** Name: Load-2   Type: Pressure
*Dsload, op=NEW
bottom, P, 0.0103052
**
** OUTPUT REQUESTS
**
*Restart, write, frequency=0
**
** FIELD OUTPUT: F-Output-2
**
*Output, field, variable=PRESELECT
**
** HISTORY OUTPUT: H-Output-1
**
*Output, history, variable=PRESELECT
*End Step
